# OpenSim document version 40000
Model AnkleBody:
  PhysicalOffsetFrame ShanksGeometricCenter: socket_parent=/bodyset/Shanks translation=(0 -0.0255471 0) [meters]
    Brick ShanksGeometricCenter_geom_1: half_lengths=(0.05 0.19065 0.1)
  PhysicalOffsetFrame ThighsGeometricCenter: socket_parent=/bodyset/Thighs translation=(0 -0.02544325 0)
    Brick ThighsGeometricCenter_geom_1: half_lengths=(0.05 0.189875 0.148025)
  PhysicalOffsetFrame HATGeometricCenter: socket_parent=/bodyset/HAT translation=(0 -0.0562464 0)
    Brick HATGeometricCenter_geom_1: half_lengths=(0.05 0.2232 0.200725)
  Ground
  BodySet:
    Body feet: mass=1.508 [kg] mass_center=(0 0 0) inertia=(1 1 0.001324822 0 0 0)
      Brick feet_geom_1: half_lengths=(0.1178 0.030225 0.08525)
    Body Shanks: mass=4.836 mass_center=(0 0 0) inertia=(1 1 0.06412595 0 0 0)
    Body Thighs: mass=10.4 mass_center=(0 0 0) inertia=(1 1 0.156471 0 0 0)
    Body HAT: mass=35.256 mass_center=(0 0 0) inertia=(1 1 1.728402 0 0 0)
    Body Nozzle: mass=0 mass_center=(0 0 0) inertia=(0 0 0 0 0 0)
      Brick Nozzle_geom_1: half_lengths=(0.25 0.05 0.05)
  JointSet:
    WeldJoint footPlant: socket_parent_frame=ground_offset socket_child_frame=feet_offset
      PhysicalOffsetFrame ground_offset: socket_parent=/ground translation=(0.03926667 0.030225 0)
      PhysicalOffsetFrame feet_offset: socket_parent=/bodyset/feet translation=(0 0 0)
    PinJoint ankle: socket_parent_frame=feet_offset socket_child_frame=Shanks_offset
      Coordinate ankleAng
      PhysicalOffsetFrame feet_offset: socket_parent=/bodyset/feet translation=(-0.03926667 0.030225 0)
      PhysicalOffsetFrame Shanks_offset: socket_parent=/bodyset/Shanks translation=(0 -0.2161971 0)
    WeldJoint kneeWeld: socket_parent_frame=Shanks_offset socket_child_frame=Thighs_offset
      PhysicalOffsetFrame Shanks_offset: socket_parent=/bodyset/Shanks translation=(0 0.1651029 0)
      PhysicalOffsetFrame Thighs_offset: socket_parent=/bodyset/Thighs translation=(0 -0.2153182 0)
    PinJoint hipJoint: socket_parent_frame=Thighs_offset socket_child_frame=HAT_offset
      Coordinate hipAng
      PhysicalOffsetFrame Thighs_offset: socket_parent=/bodyset/Thighs translation=(0 0.1644317 0)
      PhysicalOffsetFrame HAT_offset: socket_parent=/bodyset/HAT translation=(0 -0.2794464 0)
    WeldJoint nozzleWeld: socket_parent_frame=HAT_offset socket_child_frame=Nozzle_offset
      PhysicalOffsetFrame HAT_offset: socket_parent=/bodyset/HAT translation=(0 0.0615536 0)
      PhysicalOffsetFrame Nozzle_offset: socket_parent=/bodyset/Nozzle translation=(0.25 0 0)
          orientation=(0 0 0.01029046) [radians]
  ControllerSet:
    PrescribedController: enabled=false actuator_list=NozzleForce
      FunctionSet ControlFunctions:
        PiecewiseLinearFunction: x=(0 0.001 0.002 0.003 0.004 0.005 0.006 0.007 0.008 0.009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)
            y=(338.446 336.147 333.864 331.596 329.344 327.107 324.886 322.679 320.487 318.311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)
  ForceSet:
    HuntCrossleyForce Pelvis_contact_force:
      ContactParametersSet contact_parameters:
        ContactParameters: geometry=(floor pelvis) stiffness=100000000 dissipation=0.5 static_friction=0.9
            dynamic_friction=0.9 viscous_friction=0.6
    HuntCrossleyForce:
      ContactParametersSet contact_parameters:
        ContactParameters: geometry=(floor head) stiffness=100000000 dissipation=0.5 static_friction=0.9
            dynamic_friction=0.9 viscous_friction=0.6
    TorqueActuator ankleTorque: bodyA=feet bodyB=Shanks torque_is_global=true axis=(0 0 1) optimal_force=1
    TorqueActuator hipTorque: bodyA=Thighs bodyB=HAT torque_is_global=true axis=(0 0 1) optimal_force=1
    PointActuator NozzleForce: body=Nozzle point_is_global=false direction=(1 0 0) force_is_global=false
        optimal_force=1
  ContactGeometrySet:
    ContactHalfSpace floor: socket_frame=/ground location=(0 0 0) orientation=(0 0 -1.570796)
    ContactSphere pelvis: socket_frame=/bodyset/Thighs location=(0 0.1644317 0) radius=0.1
    ContactSphere head: socket_frame=/bodyset/HAT location=(0 0.3498536 0) radius=0.1
