# OpenSim document version 40000
Model DynamicWalkerModel:
  gravity: 0 -9.80665 0
  Ground
  BodySet:
    Body Platform: mass=1 [kg] inertia=(1 1 1 0 0 0)
      Brick Platform_geom_1: half_lengths=(10 0.05 1)
  JointSet:
    PinJoint PlatformToGround: socket_parent_frame=ground_offset socket_child_frame=Platform_offset
      Coordinate platform_rz: default_value=-0.1745329 range=(-1.745329 1.745329) locked=true
      PhysicalOffsetFrame ground_offset: socket_parent=/ground translation=(0 0 0) [meters]
      PhysicalOffsetFrame Platform_offset: socket_parent=/bodyset/Platform translation=(0 0 0)
