# OpenSim document version 40000
Model TwoLink:
  gravity: 0 -9.80665 0
  Ground
  BodySet:
    Body HAT: mass=35.256 [kg] inertia=(1 1 1.8 0 0 0)
      Brick HAT_geom_1: half_lengths=(0.1 0.2304 0.15)
    Body Legs: mass=16.744 inertia=(1 1 1.779485 0 0 0)
      Brick Legs_geom_1: half_lengths=(0.075 0.424 0.075)
    Body Trunk_bias: mass=0
    Body Head: mass=0
    Body Nozzle: mass=0
      Cylinder Nozzle_geom_1: radius=0.02 half_height=0.1
  JointSet:
    PinJoint LegToGround: socket_parent_frame=ground_offset socket_child_frame=Legs_offset
      Coordinate ankle_rz: default_value=0 range=(-1.570796 1.570796)
      PhysicalOffsetFrame ground_offset: socket_parent=/ground translation=(0 0 0) [meters]
      PhysicalOffsetFrame Legs_offset: socket_parent=/bodyset/Legs translation=(0 -0.424 0)
    WeldJoint hipOffset: socket_parent_frame=Legs_offset socket_child_frame=Trunk_bias_offset
      PhysicalOffsetFrame Legs_offset: socket_parent=/bodyset/Legs translation=(0 0.424 0)
      PhysicalOffsetFrame Trunk_bias_offset: socket_parent=/bodyset/Trunk_bias translation=(0 0 0)
    WeldJoint HeadWeld: socket_parent_frame=HAT_offset socket_child_frame=Head_offset
      PhysicalOffsetFrame HAT_offset: socket_parent=/bodyset/HAT translation=(0 0.4192 0)
      PhysicalOffsetFrame Head_offset: socket_parent=/bodyset/Head translation=(0 0 0)
    WeldJoint NozzleWeld: socket_parent_frame=HAT_offset socket_child_frame=Nozzle_offset
      PhysicalOffsetFrame HAT_offset: socket_parent=/bodyset/HAT translation=(0 0.1984 0)
          orientation=(0 0 1.570796) [radians]
      PhysicalOffsetFrame Nozzle_offset: socket_parent=/bodyset/Nozzle translation=(0 -0.1 0)
    PinJoint Hip: socket_parent_frame=Trunk_bias_offset socket_child_frame=HAT_offset
      Coordinate hip_rz: default_value=0 range=(-1.570796 1.570796)
      PhysicalOffsetFrame Trunk_bias_offset: socket_parent=/bodyset/Trunk_bias translation=(0 0 0)
      PhysicalOffsetFrame HAT_offset: socket_parent=/bodyset/HAT translation=(0 -0.2304 0)
  ConstraintSet:
    CoordinateCouplerConstraint verTrunk: independent_coordinate_names=ankle_rz dependent_coordinate_name=hip_rz
        coupled_coordinates_function=LinearFunction(coefficients=-1 0)
  ForceSet:
    PrescribedForce cgt: socket_frame=/bodyset/Nozzle forceIsGlobal=false
      FunctionSet forceFunctions:
        PiecewiseLinearFunction: x=(0 0.1 0.2 0.3 0.4 0.5 0.6 0.7 0.8 0.9 1) y=(0 0 0 0 0 0 0 0 0 0 0)
        PiecewiseLinearFunction: x=(0 0.1 0.2 0.3 0.4 0.5 0.6 0.7 0.8 0.9 1)
            y=(-304.601 -154.06 -77.9195 -39.4097 -19.9325 -10.0813 -5.09889 -2.57889 -1.30434 -0.659702 -0.333661)
        PiecewiseLinearFunction: x=(0 0.1 0.2 0.3 0.4 0.5 0.6 0.7 0.8 0.9 1) y=(0 0 0 0 0 0 0 0 0 0 0)
      FunctionSet pointFunctions:
        PiecewiseLinearFunction: x=(0 0.1 0.2 0.3 0.4 0.5 0.6 0.7 0.8 0.9 1) y=(0 0 0 0 0 0 0 0 0 0 0)
        PiecewiseLinearFunction: x=(0 0.1 0.2 0.3 0.4 0.5 0.6 0.7 0.8 0.9 1) y=(0 0 0 0 0 0 0 0 0 0 0)
        PiecewiseLinearFunction: x=(0 0.1 0.2 0.3 0.4 0.5 0.6 0.7 0.8 0.9 1) y=(0 0 0 0 0 0 0 0 0 0 0)
    HuntCrossleyForce PelvisForce: transition_velocity=2
      ContactParametersSet contact_parameters:
        ContactParameters: geometry=(PelvisContact Ground_HalfSpace) stiffness=10000000 dissipation=2
            static_friction=10 dynamic_friction=0.7 viscous_friction=0.7
    HuntCrossleyForce HeadForce: transition_velocity=2
      ContactParametersSet contact_parameters:
        ContactParameters: geometry=(HeadContact Ground_HalfSpace) stiffness=10000000 dissipation=2 static_friction=10
            dynamic_friction=0.7 viscous_friction=0.7
    SpringGeneralizedForce spring_hip: coordinate=hip_rz stiffness=1000 rest_length=0.005 viscosity=100
    SpringGeneralizedForce spring_ankle: coordinate=ankle_rz stiffness=10 rest_length=0.005 viscosity=100
  ContactGeometrySet:
    ContactHalfSpace Ground_HalfSpace: socket_frame=/ground location=(0 0 0) orientation=(0 0 -1.570796)
    ContactSphere PelvisContact: socket_frame=/bodyset/Legs location=(0 0.424 0) radius=0.1
    ContactSphere HeadContact: socket_frame=/bodyset/Head location=(0 0 0) radius=0.1
